# Лабораторна робота №1
# Тема: Ознайомлення з прикладним пакетом PTC Mathcad Express
# Мета: вивчення основних засобів пакета Mathcad, які застосовуються для
#
# розв’язування задачі, графічного та табличного зображення результатів,
#
# роботи з матрицями, інтегралами, похідними тощо.
## Виконання лабораторної роботи
## Задамо вхіді функції та межі їх існування
f1(x) := 1/sin(x)
f2(x) := 1/x^2
a := 0
b := 20
h := 1
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## Задамо ранжовані змінні
xi := a, a + h .. b
N := (b - a)/h = 20
k := 0 .. N - 1
xh[0] := a
xh[k + 1] := xh[k] + h
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f1(x) + f2(x) → 1/x^2 + 1/sin(x)
f1(x) - f2(x) → 1/sin(x) - 1/x^2
f1(x)*f2(x) → 1/(x^2*sin(x))
f1(x)/f2(x) → x^2/sin(x)
d/dx*f2(x) → d/(dx*x^2)
integral(f2(x), x) → -1/x
f1(x) laplace, x → laplace(1/sin(x), x, s)
f1(x) fourier, x →  # error: Символьный результат не найден.
f1(x) ztrans, x →  # error: argument must be of 'Type::Arithmetical'
k := 5
n := 6
A := [k/2, n, n + k; 3, k, 2; 1, 2*n, k/5] = [2.5, 6, 11; 3, 5, 2; 1, 12, 1]
A[2, 1] = 12
A^-1 = [
    -0.066087, 0.438261, -0.149565;
    -0.00347826, -0.0295652, 0.0973913;
    0.107826, -0.0834783, -0.0191304
]
|A| = 287.5
transpose(A) = [2.5, 3, 1; 6, 5, 12; 11, 2, 1]
A0 := A[:, 0] = [2.5; 3; 1]
A1 := A[:, 1] = [6; 5; 12]
A2 := A[:, 2] = [11; 2; 1]
A0*A2 = 34.5
vectorize(A0*A2) = [27.5; 6; 1]
sum(A0) = 6.5
## Побудуємо просторові графіки для матриці
# [component: inputs A]
# [component: inputs A]
# [component: inputs A]
# [component: inputs A]
# [component: inputs A]
# [component: inputs A]
## Висновок
## Отже на лабораторній роботі я вивчив основні засоби пакету , що застосовуються для разв'язку, графічного та табличного зображення результатів, роботи з матрицями, інтегралами , похідними
