## Лабораторна робота № 2
# Тема Розв’язування систем лінійних алгебраїчних рівнянь
# Мета: вивчення методів і набуття навичок розв’язування систем лінійних
# алгебраїчних рівнянь за допомогою пакета Mathcad.
## Виконання лабораторної роботи
# Задаємо змінним значення свого варіанту і будуємо матриці значень
n := 9
k := 7
A_0 := [
    10 + n, n/5, -2, n/6, 2;
    2*n, 20 + n, 3, 1, 3;
    3, n/4, 25, k/4, 0;
    -1, n, k, k/n, 2;
    2, k*n, 3, -5, 30
]
B_0 := [-10 + n/2; 15; -20; n/2; k + 5]
# Знаходимо розширену матрицю
D := augment(A_0, B_0) = [
    19, 1.8, -2, 1.5, 2, -5.5;
    18, 29, 3, 1, 3, 15;
    3, 2.25, 25, 1.75, 0, -20;
    -1, 9, 7, 0.777778, 2, 4.5;
    2, 63, 3, -5, 30, 12
]
# Перевіряємо наявність у матриці розв’язку
rank(A_0) = 5
rank(D) = 5
|A_0| = 322752
cols(A_0) = 5
rows(A_0) = 5
# Знаходимо корені СЛАР за допомогою обчислювального блоку
Given
A_0*X_ob == B_0
X_ob := [0; 0; 0; 0; 0]
X_ob := Find(X_ob) = [-0.812967; 1.055; -1.14313; 4.93914; -0.823805]
A_0*X_ob - B_0 = [0; -5.32907e-15; 3.55271e-15; 1.77636e-15; 0]
# Знаходимо корені СЛАР за допомогою вбудованого методу
X_um := lsolve(A_0, B_0) = [-0.812967; 1.055; -1.14313; 4.93914; -0.823805]
A_0*X_um - B_0 = [1.77636e-15; 3.55271e-15; -7.10543e-15; -1.77636e-15; -3.55271e-15]
# Знаходимо корені СЛАР за допомогою матричного методу
X_m := A_0^-1*B_0 = [-0.812967; 1.055; -1.14313; 4.93914; -0.823805]
A_0*X_m - B_0 = [-1.77636e-15; -7.10543e-15; -7.10543e-15; -5.32907e-15; -2.13163e-14]
# Знаходимо корені СЛАР за допомогою методом Гауса
X_g := rref(D)[:, rank(A_0)] = [-0.812967; 1.055; -1.14313; 4.93914; -0.823805]
A_0*X_g - B_0 = [-1.77636e-15; -7.10543e-15; 0; -3.55271e-15; -1.77636e-14]
# Знаходимо корені СЛАР за допомогою методом Крамера
A_0 := augment(A_0[:, 0], A_0[:, 1], A_0[:, 2], A_0[:, 3], A_0[:, 4])
A0 := augment(B_0, A_0[:, 1], A_0[:, 2], A_0[:, 3], A_0[:, 4])
A1 := augment(A_0[:, 0], B_0, A_0[:, 2], A_0[:, 3], A_0[:, 4])
A2 := augment(A_0[:, 0], A_0[:, 1], B_0, A_0[:, 3], A_0[:, 4])
A3 := augment(A_0[:, 0], A_0[:, 1], A_0[:, 2], B_0, A_0[:, 4])
A4 := augment(A_0[:, 0], A_0[:, 1], A_0[:, 2], A_0[:, 3], B_0)
Xk[0] := |A0|/|A_0|
Xk[1] := |A1|/|A_0|
Xk[2] := |A2|/|A_0|
Xk[3] := |A3|/|A_0|
Xk[4] := |A4|/|A_0|
Xk = [-0.812967; 1.055; -1.14313; 4.93914; -0.823805]
A_0*X_g - B_0 = [-1.77636e-15; -7.10543e-15; 0; -3.55271e-15; -1.77636e-14]
# Знаходимо корені СЛАР за допомогою ітераційного методу
AT := transpose(A_0) = [
    19, 18, 3, -1, 2;
    1.8, 29, 2.25, 9, 63;
    -2, 3, 25, 7, 3;
    1.5, 1, 1.75, 0.777778, -5;
    2, 3, 0, 2, 30
]
A_0 := transpose(augment(AT[:, 1], AT[:, 4], AT[:, 2], AT[:, 0], AT[:, 3])) = [
    18, 29, 3, 1, 3;
    2, 63, 3, -5, 30;
    3, 2.25, 25, 1.75, 0;
    19, 1.8, -2, 1.5, 2;
    -1, 9, 7, 0.777778, 2
]
i := 0 .. rows(A_0) - 1
j := 0 .. cols(A_0) - 1
a[i, j] := if(i ≠ j, -A_0[i, j]/A_0[i, i], 0)
b[i] := B_0[i]/A_0[i, i]
a = [
    0, -1.61111, -0.166667, -0.0555556, -0.166667;
    -0.031746, 0, -0.047619, 0.0793651, -0.47619;
    -0.12, -0.09, 0, -0.07, 0;
    -12.6667, -1.2, 1.33333, 0, -1.33333;
    0.5, -4.5, -3.5, -0.388889, 0
]
b = [-0.305556; 0.238095; -0.8; 3; 6]
norm1(a) = 13.3184
normi(a) = 16.5333
norme(a) = 14.1866
Xi[:, 0] := b
N := 10
k := 0 .. N - 1
Xi[:, k + 1] := a*Xi[:, k] + b
Xi = [
    -0.305556, -1.72249, 2.68891, 0.0824085, 13.5799, 5.26342, 60.8141, 29.1233, 240.798, 133.638, 948.513;
    0.238095, -2.33316, -2.9088, -7.99308, -10.7934, -34.8128, -44.2571, -135.295, -181.217, -537.264, -731.406;
    -0.8, -0.994762, -0.209577, -2.1031, 3.73347, -0.738714, 18.868, 2.36745, 80.6844, 19.8241, 317.781;
    3, -2.48201, 17.7461, -54.6283, -10.2781, -245.236, -92.6, -1040.04, -474.434, -4089.49, -2143.9;
    6, 6.40913, 20.0849, 14.2663, 70.6153, 52.2903, 263.244, 205.537, 1025.56, 843.981, 4011.48
]
# Відповіді на контрольні питання
# 1. Для існування єдиного розв’язку системи рівнянь визначник матриці повинен бути відмінним від нуля.
# 2. Основні операції над матрицями включають додавання, віднімання, множення на скаляр, множення матриць, транспонування, обчислення визначника та знаходження оберненої матриці.
# 3. Розширена матриця – це матриця, що поєднує коефіцієнти системи лінійних рівнянь та їхні вільні члени в єдину матрицю.
# 4. Прямий хід передбачає зведення системи рівнянь до трикутної форми шляхом поетапного виключення змінних. Зворотний хід полягає у розв’язанні отриманої трикутної системи методом підстановки, починаючи з останнього рівняння.
# 5. Одинична матриця – це квадратна матриця, у якій всі елементи головної діагоналі дорівнюють одиниці, а решта – нулям.
# 6. Метод Крамера дозволяє розв’язувати системи лінійних рівнянь за допомогою визначників.
# 7. Матричний метод для розв'язання системи лінійних рівнянь AX=B полягає у знаходженні вектору X як добутку оберненої матриці A^-1 і вектора B:X = A^-1B Метод застосовується, коли матриця A невироджена.
# 8. Визначник матриці можна обчислити різними способами, зокрема методом додаткових мінорів, алгебраїчних доповнень або методом Гауса.
# 9. Транспонована матриця – це результат заміни рядків матриці на стовпці та навпаки.
# 10. Мінор елемента – це визначник матриці, яка утворюється шляхом видалення рядка і стовпця, що містять цей елемент.
# 11Xi[:, k + 1] := a*Xi[:, k] + b
# 12. Метод простих ітерацій використовує послідовне наближення до розв’язку системи рівнянь, ґрунтуючись на попередніх наближеннях.
# 13. Збіжність ітераційного процесу можна перевірити, якщо норма матриці C менша за 1, що означає, що процес сходиться.
# 14. Ітераційний процес завершується, коли різниця між послідовними наближеннями стає меншою за задану точність .
# 15 lsolve та inver
# 16.  Точність розв'язку перевіряється шляхом підстановки знайденого розв’язку у початкову систему рівнянь і обчислення норми вектора нев’язки B − AX. Якщо ця норма є малою (менше заданого порогу точності), розв'язок вважається точним.
# Висновок: у ході цієї лабораторної роботи я опанував методи розв’язування систем лінійних алгебраїчних рівнянь та набув практичних навичок їхнього розв’язання з використанням програмного пакета Mathcad.
