## Лабораторна робота №3
## Тема: Розв’язування нелінійних рівнянь та їх систем
## Мета: вивчення методів і набуття навичок розв’язування нелінійних рівнянь та їх систем засобами пакета MathCAD.
## Виконання лабораторної роботи
## Задамо вхідні значення:
k := 5
n := 9
d := 3
ad := 0
b := 0.5
a[0] := (-1)^k*k = -5
a[1] := k/n = 0.555556
a[2] := k = 5
a[3] := 5*n = 45
f(xd) := sum(a[i]*xd^i, i = 0 .. d)
f(xd) → 0.555555555556*xd + 5*xd^2 + 45*xd^3 - 5
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xd := polyroots(a) = [-0.274818 - 0.421722i; -0.274818 + 0.421722i; 0.438525]
f(xd) = [-1.77636e-15 - 1.55431e-15i; -8.88178e-16 + 4.44089e-16i; -1.77636e-15]
f(x) := x^5 - 4*x^3*x^3
a := 0
b := 2.5
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a1 := 2
b1 := 2.5
f1(x) := x - sin(x)
f2(x) := 0.25
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h := 0.5
N := (b - a)/h = 5
i := 0 .. N - 1
xn[0] := a
xn[i + 1] := xn[i] + h
table := transpose(augment(xn, f(xn))) = [0, 0.5, 1, 1.5, 2, 2.5; -1282.19, -1282.16, -1281.19, -1274.59, -1250.19, -1184.53]
z1b := a1
f1b := root(f(z1b), z1b) = 0.25
## Метод дихотомії:
a[0] := a1 = 2
b[0] := b1 = 2.5
k := 0 .. 5
R(d, c) := if(f(d)*f(c) > 0, c, d)
[a[k + 1]; b[k + 1]] := [R(a[k], (a[k] + b[k])/2); R(b[k], (a[k] + b[k])/2)]
zd := (a[last(a)] + b[last(b)])/2 = 2.25
Δzd := |zd - f1b| = 2
## Метод Ньютона (дотичних):
k := 0 .. 2
f1(x) := d/dx(f(x)) → 5*x^4 - 24*x^5
zn[0] := if(f(a[0])*f1(a[0]) > 0, a[0], b[0]) = 2
zn[k + 1] := zn[k] - f(zn[k])/f1(zn[k])
znk := zn[last(zn)] = 1.17756
Δzn := |znk - f1b| = 0.927555
## Метод січних (хорд):
k := 0 .. 5
f2(x) := d^2/dx^2(f(x)) → 20*x^3 - 120*x^4
zh[0] := if(f(a[0])*f2(a[0]) > 0, a[0], b[0]) = 2
ah := if(f(a[0])*f2(a[0]) < 0, a[0], b[0]) = 2.5
zh[k + 1] := zh[k] - (ah - zh[k])*f(zh[k])/(f(ah) - f(zh[k]))
zhk := zh[last(zh)] = 1.45943
Δzh := |zhk - f1b| = 1.20943
## Метод обчислювального блоку
zob := a1
a1 = 2
Given
f(zob) == 0
zob := Find(zob) = 0.25
Δzob := |zob - f1b| = 8.69945e-10
## Система нелінійних рівнянь:
F(x, y) := 5*log(x) + log(y)
G(x, y) := x*y - 2
# [component: inputs F, G]
f(x, y) := [F(x, y); G(x, y)]
## Метод обчислювального блоку
a0 := 1
a1 := 4
Given
f(a0, a1) == 0
aa := Find(a0, a1) = [0.840896; 2.37841]
f(aa[0], aa[1]) = [-1.11022e-16; -2.22045e-16]
## Метод Ньютона:
J(x, y) := [
    d/dx(tr(transpose(f(x, y))[:, 0])), d/dy(tr(transpose(f(x, y))[:, 0]));
    d/dx(tr(transpose(f(x, y))[:, 1])), d/dy(tr(transpose(f(x, y))[:, 1]))
]
x[0] := a0
y[0] := a1
|J(x[0], y[0])| = 1.73718
Δa(c, d) := -J(c, d)^-1*f(c, d)
[x[k + 1]; y[k + 1]] := [x[k] + Δa(x[k], y[k])[0]; y[k] + Δa(x[k], y[k])[1]]
[x; y] := [x[last(x)]; y[last(x)]] = [0.840896; 2.37841]
f(x, y) = [-1.11022e-16; -2.22045e-16]
## Висновок: у ході цієї лабораторної роботи було розглянуто способи розв’язування нелінійних рівнянь та їх систем, а також вивчено відповідні методи. Найточнішим методом для розв’язання моїх функцій виявився метод Ньютона.
