# Лабораторна робота №4
# Тема: Інтерполяція функцій
# Мета: вивчення основних засобів пакета Mathcad, які застосовуються для
# розв’язування задачі, графічного та табличного зображення результатів,
# роботи з матрицями, інтегралами, похідними тощо.
# Виконання лабораторної роботи
## Задамо табличну функцію
n := 9
k := 5
x := [0; 0.2; 0.4; 0.6; 0.8; 1; 1.2; 1.4]
y := [n/(3*k); n/2*0.4; n/10 + 0.5; 0.45; 2 - n/3; -n/5; k - 3.4; sqrt(n*k)] = [0.6; 1.8; 1.4; 0.45; -1; -1.8; 1.6; 6.7082]
n := length(y) - 1 = 7
n := length(x) - 1 = 7
## Лінійна інтерполяція
yL(z) := linterp(x, y, z)
xp := 0.87
yL(x[0]) - y[0] = 0
yL(xp) = -1.28
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## Метод Лагранжа
L(z) := sum(y[i]*product(if(i == j, 1, (z - x[j])/(x[i] - x[j])), j = 0 .. n), i = 0 .. n)
L(x[0]) - y[0] = 0
L(xp) = -1.5073
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## Метод Ньютона
a := transpose(y) = [0.6, 1.8, 1.4, 0.45, -1, -1.8, 1.6, 6.7082]
i := 1 .. n
j := 0 .. n - 1
a[i, j] := if(j ≥ (n + 1) - i, 0, a[i - 1, j + 1] - a[i - 1, j])
a = [
    0.6, 1.8, 1.4, 0.45, -1, -1.8, 1.6, 6.7082;
    1.2, -0.4, -0.95, -1.45, -0.8, 3.4, 5.1082, 0;
    -1.6, -0.55, -0.5, 0.65, 4.2, 1.7082, 0, 0;
    1.05, 0.05, 1.15, 3.55, -2.4918, 0, 0, 0;
    -1, 1.1, 2.4, -6.0418, 0, 0, 0, 0;
    2.1, 1.3, -8.4418, 0, 0, 0, 0, 0;
    -0.8, -9.7418, 0, 0, 0, 0, 0, 0;
    -8.9418, 0, 0, 0, 0, 0, 0, 0
]
a := a[:, 0]
i := 0 .. n
h := x[2] - x[1] = 0.2
N(z) := a[0] + sum(a[i]/(i!*h^i)*product(z - x[k], k = 0 .. i - 1), i = 1 .. n)
N(x[0]) - y[0] = 0
N(xp) = -1.5073
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## Сплайн-інтерполяція
yls := lspline(x, y)
ls(z) := interp(yls, x, y, z)
ls(x[0]) - y[0] = 0
ls(xp) = -1.56928
ycs := cspline(x, y)
cs(z) := interp(ycs, x, y, z)
cs(x[0]) - y[0] = 0
cs(xp) = -1.56224
yps := pspline(x, y)
ps(z) := interp(yps, x, y, z)
ps(x[0]) - y[0] = 0
ps(xp) = -1.57081
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# Відповіді на контрольні питання
# 1. Інтерполяція — це метод, який дозволяє знайти значення функції в точках, що не входять до вихідного набору даних, спираючись на відомі значення функції в заданих вузлах. Основна мета — побудувати аналітичний вираз, який апроксимує функцію в цих вузлах.
#
# 2. Застосування інтерполяції охоплює різноманітні галузі, зокрема комп’ютерну графіку, обробку сигналів, чисельний аналіз, геодезію, картографію, машинобудування, економіку та астрономію.
#
# 3. Інтерполяційна функція — це функція, яка точно проходить через задані вузли інтерполяції, дозволяючи обчислювати значення функції в проміжних точках
#
# 4. Інтерполяційний поліном Лагранжа визначається як лінійна комбінація базисних поліномів Лагранжа.
#
# 5. Кінцева різниця — це різниця значень функції в двох сусідніх вузлах.
#
# 6. Кінцева різниця n-го порядку визначається як повторна різниця, обчислена від попередньої різниці.
#
# 7. Перша формула Ньютона використовується для інтерполяції у вузлах з рівновіддаленими значеннями та ґрунтується на кінцевих різницях.
# Друга формула Ньютона застосовується для вузлів, які не є рівновіддаленими, і базується на зворотних кінцевих різницях.
#
# 8. Формули Ньютона простіші у реалізації для вузлів із рівновіддаленими точками, тоді як формула Лагранжа універсальніша і застосовується для будь-якого набору вузлів. Поліном Лагранжа має глобальну структуру, тому зміна одного вузла впливає на весь поліном. Натомість формули Ньютона дозволяють легко додавати нові вузли без необхідності повної перебудови полінома.
#
# 9. Сплайн-інтерполяція — це метод, який будує гладку функцію, розбиту на частини, визначені на підінтервалах між вузлами. Найпоширеніші — кубічні сплайни, які забезпечують гладкість функції та її похідних до другого порядку.
#
# 10. У Mathcad інтерполяція розв’язується за допомогою вбудованих функцій, таких як interp або cspline, які дозволяють автоматично будувати інтерполяційні функції (у тому числі сплайни) для заданого набору точок. Інструмент надає візуалізацію результатів і можливість роботи з числовими даними в інтерактивному режимі.
## Висновок: На цьому занятті я опанував методи інтерполяції функцій, ознайомився з основними інструментами пакета Mathcad, які використовуються для розв’язання задач інтерполяції. Зокрема, я навчився створювати графічне та табличне зображення результатів, працювати з матрицями, обчислювати інтеграли, похідні та використовувати Mathcad для автоматизації чисельних розрахунків.
