# Лабораторна робота №5
# Тема: Апроксимація функцій
# Мета: вивчення методів та набуття навичок апроксимації табличних
# функцій за допомогою пакета Mathcad.
# Виконання лабораторної роботи
ns := 9
k := 5
x := [1; 2; 3; 4; 5; 6; 7]
y := [k + 0.1*ns; ns/k; ns - k; ns + k; ns*cos(k); k*ln(ns); k*ns] = [5.9; 1.8; 4; 14; 2.55296; 10.9861; 45]
d := length(x) = 7
n := d - 1 = 6
## МНК
K := 6
i := 0 .. K
j := 0 .. K
k[i, j] := sum(x[e]^(i + j), e = 0 .. n)
yd[i] := sum(x[e]^i*y[e], e = 0 .. n)
a := k^-1*yd
f(z) := sum(a[i]*z^i, i = 0 .. K)
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E := sum((f(x[e]) - y[e])^2, e = 0 .. n) = 5.92621e-12
K := 6
i := 0 .. K
j := 0 .. K
k[i, j] := sum(x[e]^(i + j), e = 0 .. n)
yd[i] := sum(x[e]^i*y[e], e = 0 .. n)
a := k^-1*yd
f(z) := sum(a[i]*z^i, i = 0 .. K)
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E := sum((f(x[e]) - y[e])^2, e = 0 .. n) = 5.92621e-12
## Вбудовані функції
x := x + 1
ae := [exp(intercept(x, vectorize(ln(y)))); slope(x, vectorize(ln(y)))] = [1.32104; 0.330849]
fe(z) := ae[0]*e^(ae[1]*z)
Ee := sum((fe(x[e]) - y[e])^2, e = 0 .. n) = 816.104
al := [intercept(x, y); slope(x, y)] = [-11.9346; 4.79376]
fl(z) := al[0] + al[1]*z
El := sum((fl(x[e]) - y[e])^2, e = 0 .. n) = 745.073
ac := [exp(intercept(vectorize(ln(x)), vectorize(ln(y)))); slope(vectorize(ln(x)), vectorize(ln(y)))] = [1.05078; 1.24304]
fc(z) := ac[0]*z^ac[1]
Ec := sum((fc(x[e]) - y[e])^2, e = 0 .. n) = 1076.87
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## Метод мінімізації
K := 6
e := 0 .. K
am[e] := 0
Given
sum((y[i] - sum(am[e]*x[i]^e, e = 0 .. K))^2, i = 0 .. n) == 0
am := Minerr(am) = [-2187.22; 3379.16; -2050.79; 628.928; -103.19; 8.62607; -0.288214]
fm(z) := sum(am[i]*z^i, i = 0 .. K)
Em := sum((fm(x[e]) - y[e])^2, e = 0 .. n) = 8.1941e-8
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## Поліноміальна апроксимація
K := 6
i := 0 .. K
X[:, i] := vectorize(x^i)
ap := (transpose(X)*X)^-1*(transpose(X)*y)
fp(z) := sum(ap[i]*z^i, i = 0 .. K)
Ep := sum((fp(x[e]) - y[e])^2, e = 0 .. n) = 1.41157e-9
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## Апроксимація Фур’є
h := x[1] - x[0] = 1
L := h*(n + 1)/2 = 3.5
K := n/2 = 3
k := 0 .. K
a := 0
a[k] := h/L*sum(y[e]*cos(k*π/L*x[e]), e = 0 .. n)
b[k] := h/L*sum(y[e]*sin(k*π/L*x[e]), e = 0 .. n)
f(z, m) := a[0]/2 + sum(a[k]*cos(k*π/L*z) + b[k]*sin(k*π/L*z), k = 1 .. m)
Ef := sum((f(x[e], 3) - y[e])^2, e = 0 .. n) = 2.01603e-28
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# Висновки:
#
# Поліноміальна апроксимація показала найкращі результати серед використаних методів завдяки високій точності та мінімальним похибкам.
#
# Метод найменших квадратів зарекомендував себе як надійний інструмент, забезпечуючи збалансований компроміс між точністю та складністю розрахунків.
#
# Вбудовані функції є швидким і зручним способом розв’язання задач, проте вони можуть демонструвати вищі похибки, що робить їх менш придатними для задач із високими вимогами до точності.
#
# Метод мінімізації забезпечує прийнятний рівень відповідності апроксимації початковим даним, але за точністю може поступатися іншим методам.
#
# Апроксимація Фур’є є ефективною для обробки періодичних даних, гармонійно представляючи функцію. Однак її точність залежить від кількості використаних гармонік.
#
# Вибір методу апроксимації має враховувати природу даних, вимоги до точності результату та доступні обчислювальні ресурси.
