## Лабораторна робота № 6
# Тема Обчислення визначених інтегралів
# Мета: вивчення методів і набуття навичок обчислення визначених інтегралів за допомогою пакета Mathcad.
# Виконання лабораторної роботи
# Завдання функції та побудова графіка
f(x) := log(x)
a := 1
b := 9
n := 10
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# Обчислення визначеного інтеграла за формулою Ньютона–Лейбніца
S_NL := integral(f(x), x = a .. b) = 5.11383
# Обчислення визначеного інтеграла методом правих прямокутників
h := (b - a)/n = 0.8
i := 0 .. n
z[i] := a + i*h
S_pp := h*sum(f(z[i]), i = 1 .. n) = 5.47536
E := |S_pp - S_NL|/S_NL = 0.0706978
i := 1 .. n
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# Обчислення визначеного інтеграла методом лівих прямокутників
S_tp := h*sum(f(z[1]), i = 0 .. n - 1) = 2.04218
E := |S_tp - S_NL|/S_NL = 0.600655
i := 0 .. n - 1
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# Обчислення визначеного інтеграла методом середніх прямокутників
S_sp := h*sum(f(z[i - 1] + h/2), i = 1 .. n) = 5.12375
E := |S_sp - S_NL|/S_NL = 0.00194086
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# Обчислення визначеного інтеграла методом трапецій
S_t := h*((f(z[0]) + f(z[n]))/2 + sum(f(z[i]), i = 1 .. n - 1)) = 5.09367
E := |S_t - S_NL|/S_NL = 0.00394235
# Обчислення визначеного інтеграла методом Сімпсона
S_s := h/3*(f(z[0]) + f(z[n]) + 4*sum(f(z[2*i - 1]), i = 1 .. 2) + 2*sum(f(z*(i - 1)), i = 2 .. 2)) = [1.09367; 1.22981; 1.31499; 1.37712; 1.42607; 1.46645; 1.50083; 1.53076; 1.55726; 1.58103; 1.6026]
E := |S_s - S_NL|/S_NL = 2.39413
# Обчислення визначеного інтеграла методом Монте-Карло
N := 1000
i := 1 .. N
z[i] := a + (b - a)*rnd(1)
S_MC := (b - a)/N*sum(f(z[i]), i = 1 .. N) = 5.08574
E := |S_MC - S_NL|/S_NL = 0.00549166
# Висновок: На цьому занятті я ознайомився з методами обчислення визначених інтегралів і набув практичних навичок їх розрахунку за допомогою пакета Mathcad. Я навчився застосовувати відповідні інструменти для точного та ефективного обчислення визначених інтегралів.
