## Лабораторна робота № 7
# Тема Розв’язування диференціальних рівнянь та їх систем
# Мета: вивчення методів та набуття навичок розв’язування диференціальних рівнянь та їх систем за допомогою пакета Mathcad.
# Виконання лабораторної роботи
# Диференціальне рівняння першого порядку
f(x, y) := x^2/2
x[0] := 0
N := 9
a := 0
b := 2
n := 10
y[0] := 0.1*N
i := 1 .. n
h := (b - a)/n = 0.2
[x[i]; y[i]] := [x[i - 1] + h; y[i - 1] + h*f(x[i - 1], y[i - 1])]
y_E := y
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# Розглянемо розв’язання рівняння методом Рунге–Кутта за всіма точками наближеного обчислення
k_1(x, y) := h*f(x, y)
k_2(x, y) := h*f(x + h/2, y + k_1(x, y)/2)
k_3(x, y) := h*f(x + h/2, y + k_2(x, y)/2)
k_4(x, y) := h*f(x + h, y + k_3(x, y))
K(x, y) := k_1(x, y) + 2*k_2(x, y) + 2*k_3(x, y) + k_4(x, y)
[x[i]; y[i]] := [x[i - 1] + h; y[i - 1] + K(x[i - 1], y[i - 1])/6]
y_Rk := y
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# Задамо початкову умову та рівняння у такому вигляд
f0 := 1
D(x, f) := f[0]*(1 - x)
# Розв’яжемо рівняння вбудованим методом Рунге–Кутта з постійним кроком
Z_Rk1 := rkfixed(f0, a, b, n, D)
transpose(Z_Rk1) = [
    0, 0.2, 0.4, 0.6, 0.8, 1, 1.2, 1.4, 1.6, 1.8, 2;
    1, 1.19722, 1.37712, 1.52196, 1.61607, 1.64872, 1.61607, 1.52196, 1.37712, 1.19721, 0.999998
]
y_Rk1 := Z_Rk1[:, 1]
# Розв’яжемо рівняння вбудованим методом Рунге–Кутта зі змінним кроком
Z_Rk2 := Rkadapt(f0, a, b, n, D)
transpose(Z_Rk2) = [
    0, 0.2, 0.4, 0.6, 0.8, 1, 1.2, 1.4, 1.6, 1.8, 2;
    1, 1.19722, 1.37713, 1.52196, 1.61607, 1.64872, 1.61607, 1.52196, 1.37713, 1.19722, 1
]
y_Rk2 := Z_Rk2[:, 1]
# Розв’яжемо рівняння вбудованим методом Буліша–Штера
Z_B := Bulstoer(f0, a, b, n, D)
transpose(Z_B) = [
    0, 0.2, 0.4, 0.6, 0.8, 1, 1.2, 1.4, 1.6, 1.8, 2;
    1, 1.19722, 1.37713, 1.52196, 1.61607, 1.64872, 1.61607, 1.52196, 1.37713, 1.19722, 1
]
y_B := Z_B[:, 1]
# Розв’яжемо рівняння вбудованим методом Радау
Z_R := Radau(f0, a, b, n, D)
transpose(Z_R) = [
    0, 0.2, 0.4, 0.6, 0.8, 1, 1.2, 1.4, 1.6, 1.8, 2;
    1, 1.19722, 1.37711, 1.52196, 1.61607, 1.64872, 1.61606, 1.52194, 1.37711, 1.19721, 0.999991
]
y_R := Z_R[:, 1]
# Побудуємо в одній площині результати розв’язання диференціального рівняння всіма методами
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# Диференціальне рівняння другого порядку
f(x, y, y') := e^(5*x) + 3*y'
x[0] := 1
y'[0] := 0
a := 1
b := 2
y[0] := N/2
[x[i]; y[i]; y'[i]] := [x[i - 1] + h; y[i - 1] + h*y'[i - 1]; y'[i - 1] + h*f(x[i - 1], y[i - 1], y'[i - 1])]
y_E := y
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# Побудуєм графік функції
f0 := [1; 0]
D(x, f) := [f[1]; f[0]*(1 - x)]
# Розв’яжемо рівняння вбудованим методом Рунге–Кутта з постійним кроком
Z_Rk1 := rkfixed(f0, a, b, n, D)
transpose(Z_Rk1) = [
    1, 1.1, 1.2, 1.3, 1.4, 1.5, 1.6, 1.7, 1.8, 1.9, 2;
    1, 0.999833, 0.998667, 0.995504, 0.989356, 0.979253, 0.964258, 0.943484, 0.916113, 0.881423, 0.838812;
    0, -0.00499958, -0.0199892, -0.0449188, -0.0796588, -0.123961, -0.177419, -0.239437, -0.309193, -0.385613, -0.467353
]
y_Rk1 := Z_Rk1[:, 1]
# Розв’яжемо рівняння вбудованим методом Рунге–Кутта зі змінним кроком
Z_Rk2 := Rkadapt(f0, a, b, n, D)
transpose(Z_Rk2) = [
    1, 1.1, 1.2, 1.3, 1.4, 1.5, 1.6, 1.7, 1.8, 1.9, 2;
    1, 0.999833, 0.998667, 0.995504, 0.989356, 0.979253, 0.964258, 0.943484, 0.916113, 0.881423, 0.838812;
    0, -0.00499967, -0.0199893, -0.044919, -0.0796591, -0.123961, -0.17742, -0.239438, -0.309193, -0.385614, -0.467354
]
y_Rk2 := Z_Rk2[:, 1]
# Розв’яжемо рівняння вбудованим методом Буліша–Штера
Z_B := Bulstoer(f0, a, b, n, D)
transpose(Z_B) = [
    1, 1.1, 1.2, 1.3, 1.4, 1.5, 1.6, 1.7, 1.8, 1.9, 2;
    1, 0.999833, 0.998667, 0.995504, 0.989356, 0.979253, 0.964258, 0.943484, 0.916113, 0.881423, 0.838812;
    0, -0.00499965, -0.0199893, -0.044919, -0.0796591, -0.123961, -0.17742, -0.239438, -0.309193, -0.385614, -0.467354
]
y_B := Z_B[:, 1]
# Розв’яжемо рівняння вбудованим методом Радау
Z_R := Radau(f0, a, b, n, D)
transpose(Z_R) = [
    1, 1.1, 1.2, 1.3, 1.4, 1.5, 1.6, 1.7, 1.8, 1.9, 2;
    1, 0.999833, 0.998667, 0.995506, 0.989355, 0.979254, 0.964258, 0.943483, 0.916114, 0.88142, 0.838812;
    0, -0.00499958, -0.0199896, -0.0449138, -0.0796662, -0.123959, -0.177422, -0.239438, -0.309191, -0.385619, -0.467354
]
y_R := Z_R[:, 1]
# Побудуємо в одній площині результати розв’язання диференціального рівняння всіма методами
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# Задамо диференціальне рівняння
f_2(x, y_0, y_1) := y[0]^2 - y[1]
f_1(x, y_0, y_1) := y[0]^2*y[1]
x[0] := -1
y[0] := 14
y[1] := -0.5
a := -1
b := 3
# Задамо початкові наближення і розв’яжемо систему диференціальних рівнянь методом Ейлера
[x[0]; f0[0]; f1[0]] := [0; 0; 2]
[x[i]; f0[i]; f1[i]] := [
    x[i - 1] + h;
    f0[i - 1] + h*f_1(x[i - 1], f0[i - 1], f1[i - 1]);
    f1[i - 1] + h*f_2(x[i - 1], f0[i - 1], f1[i - 1])
]
y_E := y
transpose(y_E) = [14, -0.5, 10.4365, 36.0721, 120.954, 376.004, 1108.21, 3160.79, 8839.89, 24436.6, 67088]
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# Побудуємо графік отриманої функції
# Запишемо систему рівнянь у матричній формі
f := [0; 2]
D(x, f) := [f[0] + f[1] - x^2 + x - 2; -2*f[0] + 4*f[1] + 2*x^2 - 4*x - 7]
# Розв’яжемо рівняння вбудованим методом Рунге–Кутта з постійним кроком
Z_Rk1 := rkfixed(f, a, b, n, D)
transpose(Z_Rk1) = [
    -1, -0.6, -0.2, 0.2, 0.6, 1, 1.4, 1.8, 2.2, 2.6, 3;
    0, 0.283947, 6.94269, 38.6784, 162.983, 615.27, 2200.13, 7632.72, 26001.3, 87565.2, 292719;
    2, 7.91851, 30.4336, 112.434, 401.095, 1394.33, 4761.52, 16066.8, 53784.1, 179093, 594250
]
y_Rk1 := Z_Rk1[:, 1]
# Розв’яжемо рівняння вбудованим методом Рунге–Кутта зі змінним кроком
Z_Rk2 := Rkadapt(f, a, b, n, D)
transpose(Z_Rk2) = [
    -1, -0.6, -0.2, 0.2, 0.6, 1, 1.4, 1.8, 2.2, 2.6, 3;
    0, 0.32353, 7.2267, 40.1641, 169.77, 644.009, 2316.07, 8085.25, 27725.7, 94018.1, 316531;
    2, 8.00368, 31.0325, 115.518, 415.018, 1452.81, 4996.16, 16979.1, 57251.4, 192045, 641993
]
y_Rk2 := Z_Rk2[:, 1]
# Розв’яжемо рівняння вбудованим методом Буліша–Штера
Z_B := Bulstoer(f, a, b, n, D)
transpose(Z_B) = [
    -1, -0.6, -0.2, 0.2, 0.6, 1, 1.4, 1.8, 2.2, 2.6, 3;
    0, 0.323593, 7.22713, 40.1663, 169.78, 644.051, 2316.24, 8085.91, 27728.2, 94027.4, 316566;
    2, 8.00381, 31.0334, 115.522, 415.038, 1452.9, 4996.5, 16980.4, 57256.4, 192064, 642062
]
y_B := Z_B[:, 1]
# Розв’яжемо рівняння вбудованим методом Радау
Z_R := Radau(f, a, b, n, D)
transpose(Z_R) = [
    -1, -0.6, -0.2, 0.2, 0.6, 1, 1.4, 1.8, 2.2, 2.6, 3;
    0, 0.323606, 7.22725, 40.1671, 169.784, 644.063, 2316.29, 8086.08, 27728.8, 94029.9, 316576;
    2, 8.00383, 31.0336, 115.524, 415.045, 1452.92, 4996.59, 16980.8, 57257.7, 192069, 642082
]
y_R := Z_R[:, 1]
# Побудуємо в одній площині результати розв’язання диференціального рівняння всіма методами
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# Висновок: На цьому занятті я освоїв методи розв’язування диференціальних рівнянь та їх систем за допомогою пакета Mathcad. Я набув практичних навичок у розв’язуванні як окремих диференціальних рівнянь, так і їх систем, використовуючи інструменти Mathcad для ефективного обчислення та аналізу результатів.
